VAX := READPRN("circuit1.DNO")
VAX = [
    0, 0;
    0.019996, 1e-8;
    0.039992, 2e-8;
    0.059988, 3e-8;
    0.079984, 4e-8;
    0.09998, 5e-8;
    0.119976, 6e-8;
    0.139972, 7e-8;
    0.159968, 8e-8;
    0.179964, 9e-8
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]
VAX[:, 1] = [
    0; 1e-8; 2e-8; 3e-8; 4e-8; 5e-8; 6e-8; 7e-8; 8e-8; 9e-8
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]
VAX[:, 0] = [
    0; 0.019996; 0.039992; 0.059988; 0.079984; 0.09998; 0.119976; 0.139972; 0.159968; 0.179964
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]
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Id3 := max(VAX[:, 1])
Id3 = 0.0330618
nMax := match(Id3, VAX[:, 1])
nMax = [50]
Ud3 := VAX[:, 0][50]
Ud3 = 0.966745
Ud1 := linterp(VAX[:, 1], VAX[:, 0], Id3/4)
Ud1 = 0.719805
Id1 := Id3/4
Id1 = 0.00826546
Ud2 := linterp(VAX[:, 1], VAX[:, 0], Id3/2)
Ud2 = 0.808237
Id2 := Id3/2
Id2 = 0.0165309
Ud4 := linterp(VAX[:, 1], VAX[:, 0], Id3/3)
Id4 := Id3/3
Id4 = 0.0110206
Ud4 = 0.750835
Rb := (Ud1 - 2*Ud2 + Ud3)/Id1
Rb = 8.47814
NFt := ((3*Ud2 - 2*Ud1) - Ud3)/ln(2)
NFt = 0.0264822
Is0 := Id1*exp(-1/NFt*(2*Ud1 - Ud3))
Is0 = 1.45375e-10
Rb := 1
IS := 1*10^-10
m := 2
Ft := 0.02
Given
0.967 == 0.033*Rb + ln((IS + 0.033)/IS)*m*Ft
0.931 == 0.029*Rb + ln((IS + 0.029)/IS)*m*Ft
0.876 == 0.023*Rb + ln((IS + 0.023)/IS)*m*Ft
0.804 == 0.016*Rb + ln((IS + 0.01)/IS)*m*Ft
Diod_P := Minerr(IS, Rb, m, Ft)
Diod_P = [0; 8.58241; 1.19907; 0.0119944]
Diod_P[0] = 7.38815e-23
Diod_P[1] = 8.58241
Diod_P[2] = 1.19907
Diod_P[3] = 0.0119944
Id := 0.972
F(Id) := Id*Diod_P[1] + ln((Diod_P[0] + Id)/Diod_P[0])*(Diod_P[2]*Diod_P[3])
F(Id) = 9.07461
Rb := 1
NFt := 0.0255
Is0 := 10^-14
Idiod := 0, 10^-2 .. 0.033
Udiod(Idiod) := Idiod*Rb + NFt*ln((Idiod + Is0)/Is0)
Idiod = [0; 0.01; 0.02; 0.03]
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NFt1 := 0.0255
Is01 := 22.7*10^6
Rb1 := 1.2
Idiod := 0, 10^-2 .. 0.033
Uformula(Idiod) := Idiod*Rb1 + NFt1*ln((Idiod + Is01)/Is01)
VAX := READPRN(".\circuit1.DNO")
Idiod := VAX[:, 1]
Idiod = [
    0; 0; 0; 0; 0; 0; 0; 0; 0; 1e-7
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]
VAX[:, 1] = [
    0; 0; 0; 0; 0; 0; 0; 0; 0; 1e-7
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]
VAX[:, 0] = [
    0; 0.019996; 0.039992; 0.059988; 0.079984; 0.09998; 0.119976; 0.139972; 0.159968; 0.179964
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]
Iproverka := VAX[:, 1][45]
VAX[:, 0][45] = 0.876354
Uformula(Iproverka) = 0.0281647
VAX[:, 1][45] = 0.0234706
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