VAX := READPRN(".\circuit1.DNO")
VAX = [
    0, 0;
    0.19996, 1e-7;
    0.399917, 3.5e-6;
    0.598963, 0.0009167;
    0.785542, 0.0143012;
    0.966745, 0.0330618;
    1.14693, 0.0528398;
    1.32672, 0.0730172;
    1.50629, 0.0934062;
    1.68574, 0.113926
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]
VAX[:, 0] = [
    0; 0.19996; 0.399917; 0.598963; 0.785542; 0.966745; 1.14693; 1.32672; 1.50629; 1.68574
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]
VAX[:, 1] = [
    0; 1e-7; 3.5e-6; 0.0009167; 0.0143012; 0.0330618; 0.0528398; 0.0730172; 0.0934062; 0.113926
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]
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Id3 := max(VAX[:, 1])
Id3 = 0.971627
nMax := match(Id3, VAX[:, 1])
nMax = [50]
Ud3 := VAX[:, 0][50]
Ud3 = 9.02657
