VAX := READPRN(".\zashita.DNO")
VAX = [
    0, 0;
    0.199899, 2e-7;
    0.397441, 0.000472;
    0.495504, 0.0208496;
    0.521089, 0.0557301;
    0.534512, 0.0930441;
    0.543578, 0.13123;
    0.550424, 0.16986;
    0.555932, 0.208758;
    0.560546, 0.247835
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]
Ud1 := max(VAX[:, 0])
Ud1 = 0.620211
Id1 := max(VAX[:, 1])
Id1 = 1.8759
Ud2 := 0.568
Id2 := 0.326
Ud2 = 0.568
Id3 := 0.445
Ud3 := 0.557
Ud1 = 0.620211
Rb := (Ud1 - 2*Ud2 + Ud3)/Id1
Rb = 0.0219686
NFt := (3*Ud2 - 2*Ud1 - Ud3)/ln(2)
NFt = -0.134779
Io := Id1*e^((Ud3 - 2*Ud2)/NFt)
Io = 137.691
Id := 0, 10^-3 .. 0.3
U(Id) := Id*Rb + NFt*ln((Id + Io)/Io)
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