Rb := 1
Io := 1*10^-10
N := 2
Ft := 0.02
Given
0.3 == 0.003*Rb + ln((Io + 0.003)/Io)*N*Ft
0.35 == 0.012*Rb + ln((Io + 0.012)/Io)*N*Ft
0.458 == 0.12*Rb + ln((Io + 0.12)/Io)*N*Ft
0.555 == 0.578*Rb + ln((Io + 0.578)/Io)*N*Ft
res := Minerr(Io, Rb, N, Ft)
res = [1.9228e-6; 0.078543; 4.98929; 0.00810349]
Io := res[0]
Rb := res[1]
N := res[2]
Ft := res[3]
Idiod := 0, 5*10^-3 .. 0.5
Udiod(Idiod) := Idiod*Rb + N*Ft*ln((Idiod + Io)/Io)
Idiod = [
    0; 0.005; 0.01; 0.015; 0.02; 0.025; 0.03; 0.035; 0.04; 0.045
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]
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Idiod = [
    0; 0.005; 0.01; 0.015; 0.02; 0.025; 0.03; 0.035; 0.04; 0.045
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]
VAX[:, 1] =  # error: This variable is undefined.
VAX[:, 0] =  # error
Iproverka := VAX[:, 1][45]
VAX[:, 0][45] =  # error
Uformula(Iproverka) =  # error
VAX[:, 1][45] =  # error
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