VAX := READPRN("Lab_04_ex_05.dlm")
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VAX = [
    0, 0;
    0.01, 4.31277e-10;
    0.02, 9.46871e-10;
    0.03, 1.5638e-9;
    0.04, 2.30252e-9;
    0.05, 3.18757e-9;
    0.06, 4.24844e-9;
    0.07, 5.52053e-9;
    0.08, 7.04632e-9;
    0.09, 8.87682e-9
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]
Id3 := max(VAX[:, 1])
Id3 = 5.06862e-7
Ud1 := 0.05
Id1 := 2.751*10^-5
Ud2 := 0.1
Id2 := 9.668*10^-5
Ud3 := 0.2
Id3 := 7.125*10^-4
Ud4 := 0.3
Id4 := 4.652*10^-3
Rb := 1
IS := (1.465*10)^-12
Ft := 0.026
m := 0.4
Given
Id1*Rb + ln((IS + Id1)/IS)*m*Ft == Ud1
Id2*Rb + ln((IS + Id2)/IS)*m*Ft == Ud2
Id3*Rb + ln((IS + Id3)/IS)*m*Ft == Ud3
Id4*Rb + ln((IS + Id4)/IS)*m*Ft == Ud4
Diod_P := Minerr(IS, Rb, m, Ft)
Diod_P = [1.05856e-8; 33.23; 0.487093; 0.0240141]
Rb1 := 33.23
NFt1 := 0.011688
Is01 := 1.059*10^-8
Uformula(Idiod) := Idiod*Rb1 + NFt1*ln((Idiod + Is01)/Is01)
Idiod := VAX[:, 1]
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