VFX := [104077, 1; 123493, 3.25; 135309, 5.5; 143894, 7.75; 150813, 10]
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Fr := VFX[:, 0]
Vvar := VFX[:, 1]
Lk := 10^-3
Ck := 10^-10
pi := 3.14
Cd := -(Ck*Lk - (1/(4*Fr^2*pi^2)))/Lk
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Fr = [104077; 123493; 135309; 143894; 150813]
Cd = [2.24084e-9; 1.56263e-9; 1.28493e-9; 1.1246e-9; 1.01482e-9]
M := 0.3333
CJO := 35*10^-12
VJO := 0.75
Given
2.241*10^-9 == CJO*(1 - (-1/VJO))^(-M)
1.563*10^-9 == CJO*(1 - (-3.25/VJO))^(-M)
1.285*10^-9 == CJO*(1 - (-5.5/VJO))^(-M)
Find(CJO, M, VJO) = [3.22044e-9; 0.442101; 0.786866]
Cd1 := 3.22*10^-9*(1 - (-VFX)[:, 1]/0.787)^-0.442
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