VFX := READPRN("circuit3 Peak_X(V(OUT),1,1) vs VVAR.ANO")
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VFX = [
    1, 331548;
    4, 384287;
    7, 406690;
    10, 420024;
    13, 429225;
    16, 436026;
    19, 441360;
    22, 445694;
    25, 449294;
    28, 452295;
    30, 454095
]
Fr := VFX[:, 1]
Vvar := (-VFX)[:, 0]
Lk := 10^-3
Ck := 10^-10
pi := 3.14
Cd := -(Ck*Lk - (1/(4*Fr^2*pi^2)))/Lk
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Fr = [331548; 384287; 406690; 420024; 429225; 436026; 441360; 445694; 449294; 452295; 454095]
Cd = [1.30668e-10; 7.16995e-11; 5.33044e-11; 4.37248e-11; 3.76289e-11; 3.33692e-11; 3.01651e-11; 2.7646e-11; 2.56084e-11; 2.39475e-11; 2.29667e-11]
M := 0.5
CJO := 10^-12
VJO := 0.6
Given
7.17*10^-11 == CJO*(1 - (-4/VJO))^(-M)
5.33*10^-11 == CJO*(1 - (-7/VJO))^(-M)
3.763*10^-11 == CJO*(1 - (-13/VJO))^(-M)
Diod_P := Find(CJO, M, VJO)
CJO := Diod_P[0]
CJO = 2.15727e-10
M = 0.5
M := Diod_P[1]
Diod_P = [2.15727e-10; 0.609263; 0.784624]
VJO := Diod_P[2]
VJO = 0.784624
Cd1 := CJO*(1 - (-VFX)[:, 0]/VJO)^(-M)
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